// COMSOL Multiphysics 6.2.0.339 model "mini proje 1 non-linear.mph"
// Outline of the model tree

Parameters
  core_width = 15 [mm]
  core_length_x = 30 [mm]
  core_length_y = 40 [mm]
  coil_length = 30 [mm]
  coil_width = 10 [mm]
  N = 300  // number of turns
  I = 2.5 [A]
  l_g_min = 0.5 [mm]  // min air gap
  r_i = 10 [mm]  // inner radius of rotor
  r_o = 12 [mm]  // outer radius of rotor
  bulge_width = 15 [mm]
  core_depth = 25 [mm]
  A_g = core_width * core_depth
  mu_g = 4*pi*1e-7
  f = 50 [Hz]
  t = 0 [s]
  r_ag = 12.5 [mm]  // radius of circle of air gap
  bulge_theta = 38.68[deg]
  theta = 0 [ deg]  // rotor rotation angle
  omega = pi/4 [rad][s]

Pairs
  ap1: Identity "Identity Boundary Pair 1a" | source: boundaries 33-40; destination: boundaries 45, 46, 53, 56

Common definitions
  rot1: RotatingDomain on domains 10-13
    rotationType = rotationalVelocity
    rotationAngle = theta
    angularVelocity = omega
    rotationAxisBasePoint = {core_length_x + core_width * 1.5, (core_length_y + 2*core_width)/2, 0}

Geometry
  geom1 "Geometry 1" (2D, length unit mm)
    r1: Rectangle | size = {core_width, core_length_y + 2*core_width}
    r2: Rectangle | pos = {core_width, core_length_y + core_width}; size = {core_length_x, core_width}
    r3: Rectangle | pos = {core_width, 0}; size = {core_length_x, core_width}
    r4: Rectangle | pos = {core_length_x + core_width, 0}; size = {core_width, core_length_y + 2*core_width}
    c1: Circle | pos = {core_length_x + core_width * 1.5, (core_length_y + 2*core_width)/2}; r = r_ag
    int1: Intersection | input = c1, r4; keep = on
    dif1: Difference | input = r4; input2 = int1
    r5: Rectangle
      pos = {-coil_width / 2, (core_length_y)/2 + core_width}
      base = center
      size = {coil_width, coil_length}
    r6: Rectangle
      pos = {coil_width / 2 + core_width, (core_length_y)/2 + core_width}
      base = center
      size = {coil_width, coil_length}
    r7: Rectangle | pos = {-20, -15}; size = {100, 100}
    dif4: Difference | input = r7; input2 = c1, dif1, r1, r2, r3, r5, r6; keepsubtract = on
    uni1: Union "core" | input = dif1, r1, r2, r3, r5, r6, dif4
    c2: Circle | pos = {core_length_x + core_width * 1.5, (core_length_y + 2*core_width)/2}; r = r_i
    c3: Circle
      pos = {core_length_x + core_width * 1.5, (core_length_y + 2*core_width)/2}
      rot = 90 - bulge_theta
      r = r_o
      angle = bulge_theta*2
    c4: Circle
      pos = {core_length_x + core_width * 1.5, (core_length_y + 2*core_width)/2}
      rot = -90 - bulge_theta
      r = r_o
      angle = bulge_theta*2
    int2: Intersection | input = c2, c3; keep = on
    dif2: Difference | input = c3; input2 = int2
    int3: Intersection | input = c2, c4; keep = on
    dif3: Difference | input = c4; input2 = int3
    uni2: Union "rotor + air" | input = c1, c2, dif2, dif3
    fin: Finalize "Form Assembly" | action = assembly

Materials
  mat1: Common "Air" on all domains
    def "Basic"
      thermalexpansioncoefficient = alpha_p(pA,T)
      molarmass = 0.02897[kg/mol]
      bulkviscosity = muB(T)
      relpermeability = 1
      relpermittivity = 1
      dynamicviscosity = eta(T)
      ratioofspecificheat = 1.4
      electricconductivity = 0[S/m]
      heatcapacity = Cp(T)
      density = rho(pA,T)
      thermalconductivity = k(T)
      soundspeed = cs(T)
      eta: Piecewise | arg = T; pieces = {200.0, 1600.0, -8.38278E-7+8.35717342E-8*T^1-7.69429583E-11*T^2+4.6437266E-14*T^3-1.06585607E-17*T^4}; argunit = K; fununit = Pa*s
      Cp: Piecewise | arg = T; pieces = {200.0, 1600.0, 1047.63657-0.372589265*T^1+9.45304214E-4*T^2-6.02409443E-7*T^3+1.2858961E-10*T^4}; argunit = K; fununit = J/(kg*K)
      rho: Analytic | expr = pA*0.02897/R_const[K*mol/J]/T; args = {pA, T}; fununit = kg/m^3; argunit = {Pa, K}
      k: Piecewise | arg = T; pieces = {200.0, 1600.0, -0.00227583562+1.15480022E-4*T^1-7.90252856E-8*T^2+4.11702505E-11*T^3-7.43864331E-15*T^4}; argunit = K; fununit = W/(m*K)
      cs: Analytic | expr = sqrt(1.4*R_const[K*mol/J]/0.02897*T); args = T; fununit = m/s; argunit = K
      an1: Analytic | funcname = alpha_p; expr = -1/rho(pA,T)*d(rho(pA,T),T); args = {pA, T}; fununit = 1/K; argunit = {Pa, K}
      an2: Analytic "Analytic 2a" | funcname = muB; expr = 0.6*eta(T); args = T; fununit = Pa*s; argunit = K
    RefractiveIndex
      n = 1
      ki = 0
    NonlinearModel
      BA = def.gamma-1
    idealGas
      Rs = R_const/Mn
      heatcapacity = Cp(T)
      ratioofspecificheat = 1.4
      molarmass = 0.02897[kg/mol]
      Cp: Piecewise | arg = T; pieces = {200.0, 1600.0, 1047.63657-0.372589265*T^1+9.45304214E-4*T^2-6.02409443E-7*T^3+1.2858961E-10*T^4}; argunit = K; fununit = J/(kg*K)
  mat2: Common "Copper" on domains 2, 6
    def "Basic"
      relpermeability = 1
      electricconductivity = 5.998e7[S/m]
      thermalexpansioncoefficient = 17e-6[1/K]
      heatcapacity = 385[J/(kg*K)]
      relpermittivity = 1
      density = 8960[kg/m^3]
      thermalconductivity = 400[W/(m*K)]
    Enu "Young's modulus and Poisson's ratio"
      E = 110[GPa]
      nu = 0.35
    linzRes "Linearized resistivity"
      rho0 = 1.72e-8[ohm*m]
      alpha = 0.0039[1/K]
      Tref = 298[K]
  mat3: Common "Soft Iron (Without Losses)" on domains 3, 4, 7-9, 11-13
    def "Basic"
      electricconductivity = 0[S/m]
      relpermittivity = 1
      relpermeability = 2500
    BHCurve
      normB = BH(normHin)
      normH = BH_inv(normBin)
      Wpm = BH_prim(normHin)
      normHin = sqrt(H1^2+H2^2+H3^2+eps)
      DESCR_PREFIX:normHin = Magnetic field norm
      normBin = sqrt(B1^2+B2^2+B3^2+eps)
      DESCR_PREFIX:normBin = Magnetic flux density norm
      BH: Interpolation
        table = 
          {0, 0}
          {663.146, 1}
          {1067.5, 1.1}
          {1705.23, 1.2}
          {2463.11, 1.3}
          {3841.67, 1.4}
          {5425.74, 1.5}
          {7957.75, 1.6}
          {12298.3, 1.7}
          {20462.8, 1.8}
          {32169.6, 1.9}
          {61213.4, 2}
          {111408, 2.1}
          {188487.757, 2.2}
          {267930.364, 2.3}
          {347507.836, 2.4}
        extrap = linear
        fununit = T
        argunit = A/m
        defineinv = on
        defineprimfun = on
    EffectiveBHCurve
      normBeff = BHeff(normHeffin)
      normHeff = BHeff_inv(normBeffin)
      normHeffin = sqrt(realdot(H1,H1)+realdot(H2,H2)+realdot(H3,H3)+eps)
      DESCR_PREFIX:normHeffin = Effective magnetic field norm
      normBeffin = sqrt(realdot(B1,B1)+realdot(B2,B2)+realdot(B3,B3)+eps)
      DESCR_PREFIX:normBeffin = Effective magnetic flux density norm
      BHeff: Interpolation
        table = 
          {0, 0}
          {663.146, 1.00000005169}
          {1067.5, 1.49364951241}
          {1705.23, 1.94153284613}
          {2463.11, 2.25776566937}
          {3841.67, 2.60998064243}
          {5425.74, 2.86644520908}
          {7957.75, 3.14414380972}
          {12298.3, 3.44853805165}
          {20462.8, 3.78167119737}
          {32169.6, 4.05834559011}
          {61213.4, 4.42064655295}
          {111408, 4.72127408955}
          {188487.757, 4.97214814072}
          {267930.364, 5.14551086086}
          {347507.836, 5.24551086143}
        extrap = linear
        fununit = T
        argunit = A/m
        defineinv = on

Physics
  mf: InductionCurrents "Magnetic Fields" on all domains
    dependent variable A = {Ax, Ay, Az}
    d.d = core_depth
    fsp1: FreeSpace (default)
    mi1: MagneticInsulation (default)
    init1: init "Initial Values 1" (default)
    cont1: Continuity on all boundaries | pairs = ap1
    als1: AmperesLawSolid "Ampère's Law in Core" on domains 3, 4, 7-9, 11-13 | ConstitutiveRelationBH = BHCurve
    als2: AmperesLawSolid "Ampère's Law in air" on domains 1, 5, 10
    coil1: Coil on domains 2, 6 | ConductorModel = Multi; coilGroup = 1; ICoil = I; N = N; materialType = from_mat
      rcd1: ReverseCoilGroupDomain "Reversed Current Direction 1" on domains 2
    fcal1: ForceCalculation on domains 11-13
      TorqueRotationPoint = {core_length_x + core_width * 1.5, (core_length_y + 2*core_width)/2, 0}

Mesh
  mesh1 "Mesh 1"
    size: MeshSizeDefault | hmax = 1.4; hauto = 2; custom = on
    ftri1: FreeTri "Free Triangular 1" on domains 10
      size1: Size on boundaries 33-40, 45, 46, 53, 56 | hmax = 0.8; hauto = 1; custom = on
    ftri2: FreeTri "Free Triangular 2" on remaining entities

Studies
  std1 "Study 1"
    param: Parametric "Parametric Sweep" (disabled) | pname = theta; plistarr = range(0,1,180); punit = deg
    stat: Stationary
    time: Transient "Time Dependent" | tlist = range(0,0.5,4)

Solver configurations
  sol1 "Solution 1" (study std1)
    v1: Variables "Dependent Variables 1"
    s1: Stationary "Stationary Solver 1"
      dDef: Direct
      fc1: FullyCoupled | linsolver = dDef; maxiter = 100; jtech = once
    su1: StoreSolution "Solution Store 1"
    v2: Variables "Dependent Variables 2" | initmethod = sol; notsolmethod = sol
    t1: Time "Time-Dependent Solver 1"
      tlist = range(0,0.5,4)
      tout = tstepsclosest
      tstepsbdf = strict
      estrat = exclude
      dDef: Direct
      fc1: FullyCoupled | linsolver = dDef; dtech = auto; ntolfact = 0.2; jtech = once
  sol2 "Solution Store 1" (study std1)

Datasets
  dset1: Solution | solution = sol1
  dset2: Solution | solution = sol2

Derived values
  gev1: EvalGlobal "Global Evaluation 1"
    data = dset1
    table = tbl1
    expr = {mf.intWe, mf.intWm, (2 * mf.intWm) / (I^2), mf.Tax_0}
    unit = {J, J, H, mN*m}

Tables
  tbl1: Table
    // Global Evaluation 1
    Time (s) | Total electric energy (J) | Total magnetic energy (J) | Coil inductance (H) | Axial torque (mN*m)
    0 | 1.10248e-17 | 0.135405 | 0.0433296 | 0.122434
    0.5 | 7.043e-21 | 0.115126 | 0.0368403 | -68.5785
    1 | 7.92705e-21 | 0.087773 | 0.0280874 | -77.7014
    1.5 | 8.78717e-21 | 0.0585616 | 0.0187397 | -65.1812
    2 | 1.59765e-22 | 0.0436428 | 0.0139657 | -0.231356
    2.5 | 6.88141e-21 | 0.0585643 | 0.0187406 | 65.7892
    3 | 8.30161e-21 | 0.0877784 | 0.0280891 | 78.1823
    3.5 | 7.76478e-21 | 0.115109 | 0.0368347 | 69.0496
    4 | 3.32222e-21 | 0.13543 | 0.0433375 | 0.113088

Plots
  pg1: PlotGroup2D "Magnetic Flux Density Norm (mf)" | data = dset1
    surf1: Surface | expr = mf.normB; descr = Magnetic flux density norm
    str1: Streamline on boundaries 4-31, 35-38, 41-58 | data = dset1; expr = {mf.BX, mf.BY}; udist = 0.03
      col1: Color "Color Expression 1" | expr = mf.normB
      filt1: Filter | expr = !isScalingSystemDomain
    con1: Contour | expr = mf.AZ; levelrounding = off
      filt1: Filter | expr = !isScalingSystemDomain
  pg2: PlotGroup2D "2D Plot Group 2" | data = dset1
    surf1: Surface | expr = mf.JZ; descr = Current density, Z-component
  pg3: PlotGroup1D "1D Plot Group 3" | data = dset1
    glob1: Global | expr = (2 * mf.intWm) / (I^2); xdata = expr; xdataexpr = omega * t
  pg4: PlotGroup1D "1D Plot Group 4" | data = dset1
    glob1: Global | expr = mf.Tax_0; unit = mN*m; xdata = expr; xdataexpr = omega*t
  pg5: PlotGroup1D "1D Plot Group 5" | data = dset1
    glob1: Global | expr = mf.PhiCoil_1
  pg6: PlotGroup2D "2D Plot Group 6" | data = dset1
    mesh1: Mesh
      sel1: MeshSelection "Selection 1" on domains 10-13

Exports
  plot1: Plot
    filename = C:\Users\Lenovo\Desktop\4.sınıf 2. dönem\ee568\mini proje 1\inductance_timedependent_nonlinear.csv
  plot2: Plot | filename = C:\Users\Lenovo\Desktop\4.sınıf 2. dönem\ee568\mini proje 1\torque_timedependent_nonlinear.csv
  anim1: Animation
    giffilename = C:\Users\Lenovo\Desktop\4.sınıf 2. dönem\ee568\mini proje 1\rotation animation nonlinear.gif