// COMSOL Multiphysics 6.2.0.339 model "mini proje 2.mph"
// Outline of the model tree

Parameters
  I = 303/(2*N)*0 [A]  // I rms
  f = 175 [Hz]
  t = 0 [s]
  ca = I*sqrt(2)*sin(2*pi*f*t)
  cb = I*sqrt(2)*sin(2*pi*f*t - 2*pi/3)
  cc = I*sqrt(2)*sin(2*pi*f*t + 2*pi/3)
  N = 18
  theta_rot = 0 [deg]
  w_m = 1500 * 2*pi/60 [rad ] / 1[ s]

Pairs
  ap1: Identity "Identity Boundary Pair 1a"
    source: boundaries 98, 99, 103, 108, 114, 120, 126, 134, 140, 145, 153, 159, 165, 171, 175
    destination: boundaries 224, 225, 228, 229, 246, 247, 258, 259, 278, 279, 290, 291, 304, 305

Common definitions
  rot1: RotatingDomain (disabled) on domains 34-50 | rotationType = rotationalVelocity; angularVelocity = w_m

Geometry
  geom1 "Geometry 1" (2D, length unit mm)
    pi1: PartInstance "External Stator – Slotted 1"
      part = part1
      inputsortedcolumn = 4
      inputname = {number_of_slots, number_of_modeled_slots, backiron_th, stator_diam, external_air_size, cont_diam, shoe_h, shoe_w, tooth_h, tooth_w, shoe_fillet_size, slot_outer_fillet_size, slot_inner_fillet_size, slot_winding_type, Arkkio_toggle, allow_inconsistent_parameters, relative_tolerance}
      inputexpr = {15, 15, 5.8[mm], 100[mm], 3[mm], 71[mm], 0.5[mm], 10.8[mm], 8.2[mm], 10.8 [mm], 0[mm], 0[mm], 0[mm], 2, 0, 1, 1e-3}
      inputvalue = {15.0, 15.0, 5.8 [mm], 100.0 [mm], 3.0 [mm], 71.0 [mm], 0.5 [mm], 10.8 [mm], 8.2 [mm], 10.8 [mm], 0.0 [mm], 0.0 [mm], 0.0 [mm], 2.0, 0.0, 1.0, 0.001}
      selnamebnd = Exterior
      selshowbnd = on
      seltagbnd = pi1_exterior
      selnamedom = {Stator iron, Stator slots, Stator air, All domains}
      selkeepdom = {off, on, off, off}
      selshowdom = {on, on, on, on}
      seltagdom = {pi1_stator_iron.dom, pi1_stator_slots, pi1_stator_air.dom, pi1_all.dom}
      selkeepnoncontr = off
      argunit = {, , m, m, m, m, m, m, m, m, m, m, m, , , , }
      lengthunit = mm
    pi2: PartInstance "Internal Rotor – Surface Mounted Magnets 1"
      part = part2
      inputname = {number_of_poles, number_of_modeled_poles, shaft_diam, rotor_diam, cont_diam, magnet_h, magnet_w, magnet_fillet_size, Arkkio_toggle, toggle_radial_magnet_side, relative_tolerance, allow_inconsistent_parameters}
      inputexpr = {14, 14, 50.4[mm], 70[mm], 71[mm], 4[mm], 12.2[mm], 0[mm], 0, 0, 1e-3, 1}
      inputvalue = {14.0, 14.0, 50.4 [mm], 70.0 [mm], 71.0 [mm], 4.0 [mm], 12.2 [mm], 0.0 [mm], 0.0, 0.0, 0.001, 1.0}
      selnamebnd = Exterior
      selshowbnd = on
      seltagbnd = pi2_exterior
      selnamedom = {Shaft, Rotor iron, Odd magnets, Even magnets, Rotor Magnets, Rotor solid domains, Rotor air, All domains}
      selkeepdom = {off, off, on, on, on, off, off, off}
      selshowdom = {on, on, on, on, on, on, on, on}
      seltagdom = {pi2_shaft.dom, pi2_rotor_iron.dom, pi2_magnets_odd.dom, pi2_magnets_even.dom, pi2_rotor_magnets, pi2_rotor_solid_domains.dom, pi2_rotor_air.dom, pi2_all.dom}
      selkeepnoncontr = off
      argunit = {, , m, m, m, m, m, m, , , , }
      lengthunit = mm
    rot1: Rotate | input = pi2; rot = theta_rot
    fin: Finalize "Form Assembly" | action = assembly
  part1 "External Stator – Slotted" (2D, length unit m)
    pch1: ParameterCheck "Parameter Check 1 (stator_diam)"
      condition = !(allow_inconsistent_parameters)&&!(stator_diam>=sd_l_l)
    pch2: ParameterCheck "Parameter Check 2 (number_of_slots)"
      condition = !(allow_inconsistent_parameters)&&!((number_of_slots==floor(number_of_slots)) && number_of_slots>=2)
    pch3: ParameterCheck "Parameter Check 3 (number of slots)"
      condition = !(allow_inconsistent_parameters)&&!(number_of_slots<=num_s_u_l)
    pch4: ParameterCheck "Parameter Check 4 (number of modeled slots)"
      condition = !(allow_inconsistent_parameters)&&!((number_of_modeled_slots==floor(number_of_modeled_slots))&&(number_of_modeled_slots>=1))
    pch5: ParameterCheck "Parameter Check 5 (number of modeled slots)"
      condition = !(allow_inconsistent_parameters)&&!(number_of_modeled_slots<=number_of_slots)
    pch6: ParameterCheck "Parameter Check 6 (backiron_th)"
      condition = !(allow_inconsistent_parameters)&&!(backiron_th<=bit_u_l)
    pch7: ParameterCheck "Parameter Check 7 (backiron_th)"
      condition = !(allow_inconsistent_parameters)&&!(backiron_th>=smallest_detail)
    pch8: ParameterCheck "Parameter Check 8 (external_air_size)"
      condition = !allow_inconsistent_parameters&&!((external_air_size==0) || (external_air_size>=smallest_detail))
    pch9: ParameterCheck "Parameter Check 9 (external_air_size)"
      condition = !allow_inconsistent_parameters&&!(external_air_size<=eas_u_l)
    pch10: ParameterCheck "Parameter Check 10 (cont_diam)"
      condition = !(allow_inconsistent_parameters)&&!(cont_diam>=cd_l_l)
    pch11: ParameterCheck "Parameter Check 11 (cont_diam)"
      condition = !(allow_inconsistent_parameters)&&!(cont_diam<=cd_u_l)
    pch12: ParameterCheck "Parameter Check 12 (shoe_h)" | condition = !allow_inconsistent_parameters && !(shoe_h<=sh_u_l)
    pch13: ParameterCheck "Parameter Check 13 (shoe_h)"
      condition = !allow_inconsistent_parameters && !((shoe_h>=smallest_detail)||(shoe_h==0))
    pch14: ParameterCheck "Parameter Check 14 (shoe_w)" | condition = !allow_inconsistent_parameters && !(shoe_w<=sw_u_l)
    pch15: ParameterCheck "Parameter Check 15 (shoe_w)"
      condition = !allow_inconsistent_parameters && !(shoe_w>=tw_lim)&&!(sh_lim==0)
    pch16: ParameterCheck "Parameter Check 16 (tooth_h)"
      condition = !(allow_inconsistent_parameters)&&!(tooth_h>=2*smallest_detail)
    pch17: ParameterCheck "Parameter Check 17 (tooth_h)"
      condition = !(allow_inconsistent_parameters)&&!(tooth_h<=th_u_l)
    pch18: ParameterCheck "Parameter Check 18 (tooth_w)" | condition = !allow_inconsistent_parameters&&!(tooth_w>=tw_l_l)
    pch19: ParameterCheck "Parameter Check 19 (tooth_w)" | condition = !allow_inconsistent_parameters&&!(tooth_w<=tw_u_l)
    pch20: ParameterCheck "Parameter Check 20 (shoe_fillet_size)"
      condition = !allow_inconsistent_parameters && !((shoe_fillet_size<=shoe_height_max_fillet)||(shoe_h==0))
    pch21: ParameterCheck "Parameter Check 21 (shoe_fillet_size)"
      condition = !allow_inconsistent_parameters && !(shoe_fillet_size<=shoe_width_max_fillet)
    pch22: ParameterCheck "Parameter Check 22 (shoe_fillet_size)"
      condition = !allow_inconsistent_parameters && !((shoe_fillet_size>=smallest_detail)||(shoe_fillet_size==0))
    pch23: ParameterCheck "Parameter Check 23 (slot_inner_fillet_size)"
      condition = !allow_inconsistent_parameters && !(slot_inner_fillet_size<=slot_height_max_inner_fillet)
    pch24: ParameterCheck "Parameter Check 24 (slot_inner_fillet_size)"
      condition = !allow_inconsistent_parameters && !(slot_inner_fillet_size<=slot_width_max_inner_fillet)
    pch25: ParameterCheck "Parameter Check 25 (slot_inner_fillet_size)"
      condition = !allow_inconsistent_parameters && !((slot_inner_fillet_size>=smallest_detail)||(slot_inner_fillet_size==0))
    pch26: ParameterCheck "Parameter Check 26 (slot_outer_fillet_size)"
      condition = !allow_inconsistent_parameters && !(slot_outer_fillet_size<=slot_height_max_outer_fillet)
    pch27: ParameterCheck "Parameter Check 27 (slot_outer_fillet_size)"
      condition = !allow_inconsistent_parameters && !(slot_outer_fillet_size<=slot_width_max_outer_fillet)
    pch28: ParameterCheck "Parameter Check 28 (slot_outer_fillet_size)"
      condition = !allow_inconsistent_parameters && !((slot_outer_fillet_size>=smallest_detail)||(slot_outer_fillet_size==0))
    c1: Circle
      rot = 90[deg]-sector_angle/2
      type = curve
      layername = Layer 1
      layer = bit_lim
      r = sd_lim/2
      angle = sector_angle
    csol1: ConvertToSolid | input = c1
    tooth: Rectangle | pos = {-tw_lim/2, inner_radius_tooth+sh_lim/2}; size = {tw_lim, th_lim-sh_lim/2}
    c10: Circle
      rot = 90[deg]-sector_angle/2
      type = curve
      layername = Layer 1
      layer = sd_lim/2
      r = sd_lim
      angle = sector_angle
    dif6: Difference | input = tooth; input2 = c10
    if1: If "If 1 (shoe)" | condition = (sh_lim>0)&&(sw_lim>tw_lim)
    c2: Circle
      rot = 90[deg]-asin(sw_lim/2/(inner_radius_tooth+sh_lim))[rad]
      type = curve
      layername = Layer 1
      layer = sh_lim
      r = inner_radius_tooth+sh_lim
      angle = shoe_angle
    csol2: ConvertToSolid | input = c2
    if2: If "If 2 (shoe fillets)" | condition = shoe_fillet_size_lim>0
    shoefpoints: DiskSelection "Points of shoe to fillet"
      inputent = selections
      input = {csol2.pnt}
      r = inner_radius_tooth+sh_lim/2
    shoewf: Fillet "Shoe with fillets" | point = selection shoefpoints; radius = shoe_fillet_size_lim
    endif2: EndIf "End If 2 (shoe fillets)"
    endif1: EndIf "End If 1 (shoe)"
    comsel1: ComplementSelection | entitydim = -1
    uni1: Union | input = selection comsel1; edge = all
    if3: If "If 3 (slot inner fillet)" | condition = (sh_lim>0)&&(slot_inner_fillet_size_lim>0)
    disksel2: DiskSelection
      r = outer_radius_slot-slot_radial_size+smallest_detail
      rin = outer_radius_slot-slot_radial_size-smallest_detail
      angle1 = 90-asin(tw_lim/(2*(outer_radius_slot-slot_radial_size)))[rad]
      angle2 = 90+asin(tw_lim/(2*(outer_radius_slot-slot_radial_size)))[rad]
    fil2: Fillet | point = selection disksel2; radius = slot_inner_fillet_size_lim
    endif3: EndIf "End If 3 (slot inner fillet)"
    if4: If "If 4 (slot outer fillet)" | condition = slot_outer_fillet_size_lim>0
    disksel1: DiskSelection
      r = outer_radius_slot+smallest_detail
      rin = outer_radius_slot-smallest_detail
      angle1 = 90-upper_tooth_angle
      angle2 = 90+upper_tooth_angle
    fil1: Fillet | point = selection disksel1; radius = slot_outer_fillet_size_lim
    endif4: EndIf "End If 4 (slot outer fillet)"
    ls1: LineSegment | specify1 = coord; coord1 = {0, sd_lim/2}; specify2 = coord; coord2 = {0, inner_radius_tooth}
    csol3: ConvertToSolid | input = ls1, uni1
    spl1: Split | input = csol3
    rot2: Rotate | input = spl1(2); rot = sector_angle
    ironsector: Union | input = rot2, spl1(1); edge = all
    rot3: Rotate "Iron sector rotation" | input = selection ironsector; rot = sector_angle*range(0,1,nms_lim-1)
    stator_iron: Union "%Stator_iron" | input = selection rot3; edge = all
    if5: If "If 5 (slot_winding_type==1)" | condition = slot_winding_type==1
    c3: Circle
      rot = 90[deg]
      type = curve
      layername = Layer 1
      layer = slot_radial_size
      r = sd_lim/2-bit_lim
      angle = sector_angle
    csol4: ConvertToSolid | input = c3
    slotfillingTypeOnesector: Difference "slot_winding_type 1 sector"
      input = csol4
      input2 = stator_iron
      keepadd = on
      keepsubtract = on
      edge = all
    del1: Delete "Delete Entities 1" | input = csol4
    rot4: Rotate "slot_winding_type 1 sector rotation"
      input = selection slotfillingTypeOnesector
      rot = sector_angle*range(0,1,nms_lim-1)
    slotfillingTypeOne: Union "slot_winding_type 1" | input = selection rot4
    slotfilling2: ElseIf "Else If 5 (slot_winding_type==2)" | condition = slot_winding_type==2
    c4: Circle
      rot = 90[deg]
      type = curve
      layername = Layer 1
      layer = slot_radial_size
      r = sd_lim/2-bit_lim
      angle = sector_angle
    csol5: ConvertToSolid | input = c4
    ls21: LineSegment
      specify1 = coord
      coord1 = {sd_lim/2*sin(-sector_angle/2), sd_lim/2*cos(-sector_angle/2)}
      specify2 = coord
    csol6: ConvertToSolid | input = csol5, ls21
    slotfillingTypeTwosector: Difference "slot_winding_type 2 sector"
      input = csol6
      input2 = stator_iron
      keepadd = on
      keepsubtract = on
    del2: Delete "Delete Entities 2" | input = csol6
    rot5: Rotate "slot_winding_type 2 sector rotation"
      input = selection slotfillingTypeTwosector
      rot = sector_angle*range(0,1,nms_lim-1)
    slotfillingTypeTwo: Union "slot_winding_type 2" | input = selection rot5
    slotfilling3: ElseIf "Else If 5 (slot_winding_type==3)" | condition = slot_winding_type==3
    c5: Circle
      rot = 90[deg]
      type = curve
      layername = {Layer 1, Layer 2}
      layer = {slot_layer_size_outer, slot_layer_size_inner}
      r = (sd_lim/2-bit_lim)
      angle = sector_angle
    csol7: ConvertToSolid | input = c5
    slotfillingTypeThreesector: Difference "slot_winding_type 3 sector"
      input = csol7
      input2 = stator_iron
      keepadd = on
      keepsubtract = on
    del3: Delete "Delete Entities 3" | input = csol7
    rot6: Rotate "slot_winding_type 3 sector rotation"
      input = selection slotfillingTypeThreesector
      rot = sector_angle*range(0,1,nms_lim-1)
    slotfillingTypeThree: Union "slot_winding_type 3" | input = selection rot6
    slotfilling4: ElseIf "Else If 5 (slot_winding_type==4)" | condition = slot_winding_type==4
    c6: Circle
      rot = 90[deg]
      type = curve
      layername = {Layer 1, Layer 2}
      layer = {slot_layer_size_outer, slot_layer_size_inner}
      r = sd_lim/2-bit_lim
      angle = sector_angle
    csol8: ConvertToSolid | input = c6
    ls41: LineSegment
      specify1 = coord
      coord1 = {sd_lim/2*sin(-sector_angle/2), sd_lim/2*cos(-sector_angle/2)}
      specify2 = coord
    csol9: ConvertToSolid | input = csol8, ls41
    slotfillingTypeFoursector: Difference "slot_winding_type 4 sector"
      input = csol9
      input2 = stator_iron
      keepadd = on
      keepsubtract = on
    del4: Delete "Delete Entities 4" | input = csol9
    rot7: Rotate "slot_winding_type 4 sector rotation"
      input = selection slotfillingTypeFoursector
      rot = sector_angle*range(0,1,nms_lim-1)
    slotfillingTypeFour: Union "slot_winding_type 4" | input = selection rot7
    endif5: EndIf "End If 5 (slot_winding_type)"
    stator_slots: UnionSelection "%Stator_slots"
      entitydim = 2
      input = {slotfillingTypeOne.dom, slotfillingTypeTwo.dom, slotfillingTypeThree.dom, slotfillingTypeFour.dom}
    unisel2: UnionSelection "All solid rotor parts"
      entitydim = -1
      input = {stator_iron, slotfillingTypeOne, slotfillingTypeTwo, slotfillingTypeThree, slotfillingTypeFour}
    c7: Circle | rot = 90[deg]; r = r_external_air; angle = sector_angle
    c8: Circle | rot = 90[deg]; r = cd_lim/2; angle = sector_angle
    dif5: Difference | input = c7; input2 = c8
    airsector: Difference "Stator air sector" | input = dif5; input2 = selection unisel2; keepadd = on; keepsubtract = on
    del5: Delete "Delete Entities 5" | input = dif5
    rot8: Rotate "Stator air sector rotation" | input = selection airsector; rot = sector_angle*range(0,1,nms_lim-1)
    stator_air: Union "%Stator_air" | input = selection rot8; edge = all
    if11: If "If 11 (draw Arkkio air gap)" | condition = (Arkkio_toggle==1)&&(cd_lim<2*inner_radius_tooth)
    c9: Circle
      rot = 90[deg]
      type = curve
      layername = Layer 1
      layer = (2*inner_radius_tooth-cd_lim)/4
      r = inner_radius_tooth - (2*inner_radius_tooth-cd_lim)/4
      angle = sector_angle
    csol10: ConvertToSolid | input = c9
    rot12: Rotate | input = selection csol10; rot = sector_angle*range(0,1,floor(nms_lim)-1)
    arkkio_air_gap: Union "%Arkkio_air_gap" | input = selection rot12; edge = all
    endif11: EndIf "End If 11 (draw Arkkio air gap)"
    comsel2: ComplementSelection | entitydim = -1
    all: Union "%All_domains" | input = selection comsel2
    exterior: AdjacentSelection | entitydim = 2; input = {all.dom}; outputdim = 1
    if8: If "If 8 (Less than entiry geometry)" | condition = nms_lim<num_s_lim
    rot9: Rotate | input = all; rot = -90[deg]
    BoxSelection1: BoxSelection | entitydim = 1; xmin = -eps; ymin = -eps; ymax = eps; condition = inside
    rot10: Rotate | input = rot9; rot = 180[deg]-sector_angle*nms_lim
    BoxSelection2: BoxSelection | entitydim = 1; xmax = eps; ymin = -eps; ymax = eps; condition = inside
    periodic_source: UnionSelection "%Periodic_source" | entitydim = 1; input = {BoxSelection1}
    periodic_boundaries: UnionSelection "%Periodic_boundaries" | entitydim = 1; input = {BoxSelection1, BoxSelection2}
    rot11: Rotate | input = rot10; rot = -(180[deg]-sector_angle*nms_lim)
    endif8: EndIf "End If 8 (Less than entiry geometry)"
  part2 "Internal Rotor – Surface Mounted Magnets" (2D, length unit m)
    pch1: ParameterCheck "Parameter Check 1 (rotor_diam)"
      condition = !(allow_inconsistent_parameters)&&!(rotor_diam>=rd_l_l)
    pch2: ParameterCheck "Parameter Check 2 (number of poles)"
      condition = !(allow_inconsistent_parameters)&&!(((number_of_poles/2)==floor(number_of_poles/2)) && (number_of_poles>=4))
    pch3: ParameterCheck "Parameter Check 3 (number of poles)"
      condition = !(allow_inconsistent_parameters)&&!(number_of_poles<=num_p_u_l)
    pch4: ParameterCheck "Parameter Check 4 (number of modeled poles)"
      condition = !(allow_inconsistent_parameters)&&!((number_of_modeled_poles==floor(number_of_modeled_poles))&&(number_of_modeled_poles>=1))
    pch5: ParameterCheck "Parameter Check 5 (number of modeled poles)"
      condition = !(allow_inconsistent_parameters)&&!(number_of_modeled_poles<=number_of_poles)
    pch6: ParameterCheck "Parameter Check 6 (shaft_diam)"
      condition = !(allow_inconsistent_parameters)&&!(shaft_diam>=2*smallest_detail)
    pch7: ParameterCheck "Parameter Check 7 (shaft_diam)"
      condition = !(allow_inconsistent_parameters)&&!(shaft_diam<=rotor_diam-2*magnet_h-2*smallest_detail)
    pch8: ParameterCheck "Parameter Check 8 (cont_diam)"
      condition = !(allow_inconsistent_parameters)&&!((cont_diam >=rotor_diam)||cont_diam==0)
    pch9: ParameterCheck "Parameter Check 9 (cont_diam)"
      condition = !(allow_inconsistent_parameters)&&!(cont_diam<=cd_u_l)
    pch10: ParameterCheck "Parameter Check 10 (magnet_h)"
      condition = !(allow_inconsistent_parameters)&&!(magnet_h>=smallest_detail)
    pch11: ParameterCheck "Parameter Check 11 (magnet_h)"
      condition = !(allow_inconsistent_parameters)&&!(magnet_h <= rotor_diam/2 - 2*smallest_detail)
    pch12: ParameterCheck "Parameter Check 12 (magnet_w)"
      condition = !allow_inconsistent_parameters && !((magnet_w==0) || (magnet_w>=smallest_detail))
    pch13: ParameterCheck "Parameter Check 13 (magnet_w)"
      condition = !allow_inconsistent_parameters && !(magnet_w<=(maximum_magnet_w-smallest_detail))
    pch14: ParameterCheck "Parameter Check 14 (magnet_fillet_size)"
      condition = !allow_inconsistent_parameters && !((magnet_fillet_size>=smallest_detail)||(magnet_fillet_size==0))
    pch15: ParameterCheck "Parameter Check 15 (magnet_fillet_size)"
      condition = !allow_inconsistent_parameters && !(magnet_fillet_size<=magnet_h_max_fillet)
    pch16: ParameterCheck "Parameter Check 16 (magnet_fillet_size)"
      condition = !allow_inconsistent_parameters && !(magnet_fillet_size<=magnet_w_max_fillet)
    c1: Circle "Shaft sector" | rot = 90[deg]-sector_angle/2; r = shaft_d_lim/2; angle = sector_angle
    rot1: Rotate "Rotation 1" | input = selection c1; rot = sector_angle*range(0,1,floor(nmp_l)-1)
    shaft: Union "%Shaft[motorparts]" | input = selection rot1; edge = all
    c2: Circle
      rot = 90[deg]-sector_angle/2
      type = curve
      layername = Layer 1
      layer = rd_lim/2-magnet_h_lim-shaft_d_lim/2
      r = rd_lim/2-magnet_h_lim
      angle = sector_angle
    ironsector: ConvertToSolid | input = c2
    rot2: Rotate "Rotation 2" | input = selection ironsector; rot = sector_angle*range(0,1,floor(nmp_l)-1)
    rotor_iron: Union "%Rotor_iron" | input = selection rot2; edge = all
    c3: Circle
      rot = 90[deg]-alpha_magnet_out/2
      type = curve
      layername = Layer 1
      layer = magnet_h_lim
      r = rd_lim/2
      angle = alpha_magnet_out
    mop: ConvertToSolid | input = c3
    if1: If "If 1 (!toggle_radial_magnet_side)" | condition = !toggle_radial_magnet_side
    rp: Rectangle
      pos = {-magnet_w_lim/2, (rd_lim/2-magnet_h_lim)*cos(alpha_magnet_in/2)}
      size = {magnet_w_lim, magnet_side_height}
    endif7: EndIf
    c4: Circle | rot = 90[deg]-alpha_magnet_in/2; r = rd_lim/2-magnet_h_lim; angle = alpha_magnet_in
    ump: Union | input = mop, rp; edge = all
    omagnetwof: Difference "Outer magnetized magnet" | input = ump; input2 = c4; edge = all
    if2: If "If 2 (nmp_l)" | condition = nmp_l>1
    inmagnetwof: Rotate "Inward Facing Magnet" | input = selection omagnetwof; keep = on; rot = sector_angle
    domagnetwof: DifferenceSelection | entitydim = -1; add = {omagnetwof}; subtract = {inmagnetwof}
    magnets_odd: Rotate "%Magnets_odd" | input = selection domagnetwof; rot = 2*sector_angle*range(0,1,floor((nmp_l-1)/2))
    magnets_even: Rotate "%Magnets_even" | input = selection inmagnetwof; rot = 2*sector_angle*range(0,1,floor(nmp_l/2)-1)
    endif1: EndIf "End If 1 (nmp_l>1)"
    rotor_magnets: UnionSelection "%Rotor_Magnets"
      entitydim = 2
      input = {magnets_even.dom, magnets_odd.dom, omagnetwof.dom}
    rotor_solid_domains: UnionSelection "%Rotor_solid_domains"
      entitydim = -1
      input = {shaft, rotor_iron, magnets_even, magnets_odd, omagnetwof}
      selshow = dom
    if3: If "If 3 (magnet fillets can be drawn)" | condition = magnet_fillet_size_lim>smallest_detail
    disksel1: DiskSelection
      inputent = selections
      input = {magnets_odd.pnt, magnets_even.pnt, omagnetwof.pnt}
      r = rd_lim
      rin = rd_lim/2-magnet_h_lim/2
    fil1: Fillet | point = selection disksel1; radius = magnet_fillet_size_lim
    endif2: EndIf "End If 2 (magnet fillets can be drawn)"
    if4: If "If 4 (draw air)" | condition = diam_cont_lim > 0
    c5: Circle | rot = 90[deg]-sector_angle/2; r = diam_cont_lim/2; angle = sector_angle
    airsector: Difference "Rotor air sector"
      input = c5
      input2 = selection rotor_solid_domains
      keepadd = on
      keepsubtract = on
    del5: Delete "Delete Entities 5" | input = c5
    rot3: Rotate "Air sector rotation" | input = selection airsector; rot = sector_angle*range(0,1,floor(nmp_l)-1)
    rotor_air: Union "%Rotor_air" | input = selection rot3; edge = all
    if10: If "If 10 (draw Arkkio air gap)" | condition = (Arkkio_toggle==1)&&(diam_cont_lim>rd_lim)
    c6: Circle
      rot = 90[deg]-sector_angle/2
      type = curve
      layername = Layer 1
      layer = (diam_cont_lim-rd_lim)/4
      r = diam_cont_lim/2
      angle = sector_angle
    csol2: ConvertToSolid | input = c6
    rot7: Rotate | input = selection csol2; rot = sector_angle*range(0,1,floor(nmp_l)-1)
    arkkio_air_gap: Union "%Arkkio_air_gap" | input = selection rot7; edge = all
    endif10: EndIf "End If 10 (draw Arkkio air gap)"
    endif3: EndIf "End If 3 (draw air)"
    comsel1: ComplementSelection | entitydim = -1
    all: Union "%All_domains" | input = selection comsel1
    exterior: AdjacentSelection | entitydim = 2; input = {all.dom}; outputdim = 1
    if8: If "If 8 (Less than entiry geometry)" | condition = nmp_l<num_p_lim
    rot6: Rotate | input = all; rot = -(90[deg]-sector_angle/2)
    BoxSelection1: BoxSelection | entitydim = 1; xmin = -eps; ymin = -eps; ymax = eps; condition = inside
    rot8: Rotate "Rotate 8a" | input = rot6; rot = 180[deg]-sector_angle*nmp_l
    BoxSelection2: BoxSelection | entitydim = 1; xmax = eps; ymin = -eps; ymax = eps; condition = inside
    periodic_source: UnionSelection "%Periodic_source" | entitydim = 1; input = {BoxSelection1}
    periodic_boundaries: UnionSelection "%Periodic_boundaries" | entitydim = 1; input = {BoxSelection1, BoxSelection2}
    rot9: Rotate | input = rot8; rot = -(180[deg]-sector_angle*nmp_l)
    endif8: EndIf "End If 8 (Less than entiry geometry)"

Materials
  mat1: Common "Air" on domains 8, 33, 34
    def "Basic"
      thermalexpansioncoefficient = alpha_p(pA,T)
      molarmass = 0.02897[kg/mol]
      bulkviscosity = muB(T)
      relpermeability = 1
      relpermittivity = 1
      dynamicviscosity = eta(T)
      ratioofspecificheat = 1.4
      electricconductivity = 0[S/m]
      heatcapacity = Cp(T)
      density = rho(pA,T)
      thermalconductivity = k(T)
      soundspeed = cs(T)
      eta: Piecewise | arg = T; pieces = {200.0, 1600.0, -8.38278E-7+8.35717342E-8*T^1-7.69429583E-11*T^2+4.6437266E-14*T^3-1.06585607E-17*T^4}; argunit = K; fununit = Pa*s
      Cp: Piecewise | arg = T; pieces = {200.0, 1600.0, 1047.63657-0.372589265*T^1+9.45304214E-4*T^2-6.02409443E-7*T^3+1.2858961E-10*T^4}; argunit = K; fununit = J/(kg*K)
      rho: Analytic | expr = pA*0.02897/R_const[K*mol/J]/T; args = {pA, T}; fununit = kg/m^3; argunit = {Pa, K}
      k: Piecewise | arg = T; pieces = {200.0, 1600.0, -0.00227583562+1.15480022E-4*T^1-7.90252856E-8*T^2+4.11702505E-11*T^3-7.43864331E-15*T^4}; argunit = K; fununit = W/(m*K)
      cs: Analytic | expr = sqrt(1.4*R_const[K*mol/J]/0.02897*T); args = T; fununit = m/s; argunit = K
      an1: Analytic | funcname = alpha_p; expr = -1/rho(pA,T)*d(rho(pA,T),T); args = {pA, T}; fununit = 1/K; argunit = {Pa, K}
      an2: Analytic "Analytic 2a" | funcname = muB; expr = 0.6*eta(T); args = T; fununit = Pa*s; argunit = K
    RefractiveIndex
      n = 1
      ki = 0
    NonlinearModel
      BA = def.gamma-1
    idealGas
      Rs = R_const/Mn
      heatcapacity = Cp(T)
      ratioofspecificheat = 1.4
      molarmass = 0.02897[kg/mol]
      Cp: Piecewise | arg = T; pieces = {200.0, 1600.0, 1047.63657-0.372589265*T^1+9.45304214E-4*T^2-6.02409443E-7*T^3+1.2858961E-10*T^4}; argunit = K; fununit = J/(kg*K)
  mat2: Common "Soft Iron (Without Losses)" on domains 2, 49, 50
    def "Basic"
      electricconductivity = 0[S/m]
      relpermittivity = 1
      relpermeability = 2000
    BHCurve
      normB = BH(normHin)
      normH = BH_inv(normBin)
      Wpm = BH_prim(normHin)
      normHin = sqrt(H1^2+H2^2+H3^2+eps)
      DESCR_PREFIX:normHin = Magnetic field norm
      normBin = sqrt(B1^2+B2^2+B3^2+eps)
      DESCR_PREFIX:normBin = Magnetic flux density norm
      BH: Interpolation
        table = 
          {0, 0}
          {663.146, 1}
          {1067.5, 1.1}
          {1705.23, 1.2}
          {2463.11, 1.3}
          {3841.67, 1.4}
          {5425.74, 1.5}
          {7957.75, 1.6}
          {12298.3, 1.7}
          {20462.8, 1.8}
          {32169.6, 1.9}
          {61213.4, 2}
          {111408, 2.1}
          {188487.757, 2.2}
          {267930.364, 2.3}
          {347507.836, 2.4}
        extrap = linear
        fununit = T
        argunit = A/m
        defineinv = on
        defineprimfun = on
    EffectiveBHCurve
      normBeff = BHeff(normHeffin)
      normHeff = BHeff_inv(normBeffin)
      normHeffin = sqrt(realdot(H1,H1)+realdot(H2,H2)+realdot(H3,H3)+eps)
      DESCR_PREFIX:normHeffin = Effective magnetic field norm
      normBeffin = sqrt(realdot(B1,B1)+realdot(B2,B2)+realdot(B3,B3)+eps)
      DESCR_PREFIX:normBeffin = Effective magnetic flux density norm
      BHeff: Interpolation
        table = 
          {0, 0}
          {663.146, 1.00000005169}
          {1067.5, 1.49364951241}
          {1705.23, 1.94153284613}
          {2463.11, 2.25776566937}
          {3841.67, 2.60998064243}
          {5425.74, 2.86644520908}
          {7957.75, 3.14414380972}
          {12298.3, 3.44853805165}
          {20462.8, 3.78167119737}
          {32169.6, 4.05834559011}
          {61213.4, 4.42064655295}
          {111408, 4.72127408955}
          {188487.757, 4.97214814072}
          {267930.364, 5.14551086086}
          {347507.836, 5.24551086143}
        extrap = linear
        fununit = T
        argunit = A/m
        defineinv = on
  mat3: Common "Copper" on selection geom1_pi1_stator_slots
    def "Basic"
      relpermeability = 1
      electricconductivity = 5.998e7[S/m]
      thermalexpansioncoefficient = 17e-6[1/K]
      heatcapacity = 385[J/(kg*K)]
      relpermittivity = 1
      density = 8960[kg/m^3]
      thermalconductivity = 400[W/(m*K)]
    Enu "Young's modulus and Poisson's ratio"
      E = 110[GPa]
      nu = 0.35
    linzRes "Linearized resistivity"
      rho0 = 1.72e-8[ohm*m]
      alpha = 0.0039[1/K]
      Tref = 298[K]
  mat4: Common "N42 (Sintered NdFeB)" on selection geom1_pi2_rotor_magnets
    def "Basic"
      electricconductivity = 1/1.4[uohm*m]
      relpermittivity = 1
    RemanentFluxDensity
      murec = 1.05
      normBr = 1.31[T]

Physics
  mf: InductionCurrents "Magnetic Fields" on all domains
    dependent variable A = {Ax, Ay, Az}
    d.d = 0.1
    fsp1: FreeSpace (default)
    mi1: MagneticInsulation (default)
    init1: init "Initial Values 1" (default)
    mag1: Magnet on selection geom1_pi2_rotor_magnets
      north1: North on boundaries 226, 231, 233, 235, 237, 238, 240, 248, 250, 253, 255, 261, 262, 265, 267, 272, 275, 277, 280, 285, 286, 288, 295, 296, 299, 301, 303, 306
      south1: South on boundaries 227, 230, 232, 234, 236, 239, 241, 249, 251, 252, 254, 260, 263, 264, 266, 273, 274, 276, 281, 284, 287, 289, 294, 297, 298, 300, 302, 307
    coil1: Coil "ph A" on domains 7, 11, 12, 15, 16, 19, 20, 23, 24, 27
      ConductorModel = Multi
      coilGroup = 1
      ICoil = ca
      N = 4
      rcd1: ReverseCoilGroupDomain "Reversed Current Direction 1" on domains 7, 15, 16, 23, 24
    coil2: Coil "ph B" on domains 1, 3-6, 9, 10, 13, 14, 17 | ConductorModel = Multi; coilGroup = 1; ICoil = cb; N = 4
      rcd1: ReverseCoilGroupDomain "Reversed Current Direction 1" on domains 1, 3, 9, 10, 17
    coil3: Coil "ph C" on domains 18, 21, 22, 25, 26, 28-32 | ConductorModel = Multi; coilGroup = 1; ICoil = cc; N = 4
      rcd1: ReverseCoilGroupDomain "Reversed Current Direction 1" on domains 21, 22, 28-30
    als1: AmperesLawSolid "Ampère's Law in Solids 1" on domains 2, 8, 33, 34, 49, 50
    cont1: Continuity on all boundaries | pairs = ap1
    fcal1: ForceCalculation on domains 35-50

Mesh
  mesh1 "Mesh 1"
    size: MeshSizeDefault | hauto = 3
    auto_f1: FreeTri "Free Triangular 1" on domains 8, 34
      size1: Size on domains 8, 34 | hauto = 2
    ftri1: FreeTri "Free Triangular 1a" on remaining entities

Studies
  std1 "Study 1"
    param: Parametric "Parametric Sweep"
      pname = theta_rot
      plistarr = range(0,0.2,24)
      punit = deg
      switchname = default
      switchcase = user
    stat: Stationary
    time: Transient "Time Dependent" (disabled) | tlist = range(0,1/(175*15),1/175)

Solver configurations
  sol1 "Solution 1" (study std1)
    v1: Variables "Dependent Variables 1"
    s1: Stationary "Stationary Solver 1"
      dDef: Direct
      fc1: FullyCoupled | linsolver = dDef
  sol2 "Parametric Solutions 1" (study std1)

Datasets
  dset1: Solution | solution = sol1
  pc1: ParCurve2D "Parameterized Curve 2D 1"
    data = dset1
    parmax1 = 2*pi
    exprx = 35.8[mm]*cos(s)
    expry = 35.8[mm]*sin(s)
  dset2: Solution | solution = sol2
  pc2: ParCurve2D "Parameterized Curve 2D 2"
    data = dset1
    parmax1 = pi/7
    exprx = 35.8[mm]*cos(s)
    expry = 35.8[mm]*sin(s)

Derived values
  int1: IntLine "Line Integration 1"
    data = pc2
    table = tbl2
    expr = 0.102[m] * (mf.Bx * x + mf.By * y) / sqrt(x^2 + y^2)
    unit = Wb

Tables
  mm1: Table "Maximum and Minimum Values"
    // Max/min surface
    x | y | Magnetic flux density norm (T)
    -5.18802 | 30.5628 | 2.45023
  tbl2: Table
    // Line Integration 1
    0.102[m] * (mf.Bx * x + mf.By * y) / sqrt(x^2 + y^2) (Wb)
    0.00108517

Plots
  pg1: PlotGroup2D "Magnetic Flux Density Norm (mf)" | data = dset1
    surf1: Surface | expr = mf.normB
    str1: Streamline on boundaries 1, 3, 4, 6, 7, 10, 11, 13, 15, 18-20, 23-25, 27, 30-32, 35-37, 40, 42, 45, 47, 51, 52, 56, 57, 61, 62, 66, 67, 71, 73, 75-95, 98-100, 103, 104, 107-111, 114, 115, 117, 118, 120-123, 126-130, 132, 134, 135, 137, 138, 140-142, 144, 145, 147-150, 152, 153, 155, 157-159, 161, 162, 164, 165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
      expr = {mf.Bx, mf.By}
      udist = 0.03
      radiusexpr = 10
      arrowcount = 400
      arrowscale = 4
      col1: Color "Color Expression 1" | expr = mf.normB
      filt1: Filter | expr = !isScalingSystemDomain
    con1: Contour | expr = mf.Az; levelrounding = off
      filt1: Filter | expr = !isScalingSystemDomain
    mms1: MaxMinSurface | expr = mf.normB; display = max; table = mm1
  pg2: PlotGroup2D "2D Plot Group 2" | data = dset2
    surf1: Surface | expr = (mf.Bx * x + mf.By * y) / sqrt(x^2 + y^2); unit = T
    str1: Streamline | expr = {mf.Bx, mf.By}; selnumber = 30; udist = 0.015; pointtype = arrow; arrowcount = 197
  pg3: PlotGroup2D "2D Plot Group 3" | data = dset1
    arws1: ArrowSurface | expr = {mf.Bx, mf.By}; xnumber = 40; ynumber = 40; arrowlength = logarithmic
  pg4: PlotGroup1D "1D Plot Group 4" | data = dset2
    glob1: Global | data = dset2; expr = mf.Tax_0; descr = Cogging torque; xdata = expr; xdataexpr = theta_rot
  pg5: PlotGroup1D "1D Plot Group 5" | data = dset1
    lngr1: LineGraph
      data = pc1
      expr = (mf.Bx * x + mf.By * y) / sqrt(x^2 + y^2)
      descr = Radial Magnetic Flux Density
      xdata = expr
      xdataexpr = s
  pg6: PlotGroup2D "Magnetic Flux Density Norm (mf) 1" | data = dset2
    surf1: Surface | expr = mf.normB
    str1: Streamline on boundaries 1-307 | expr = {mf.Bx, mf.By}; udist = 0.03
      col1: Color "Color Expression 1" | expr = mf.normB
      filt1: Filter | expr = !isScalingSystemDomain
    con1: Contour | expr = mf.Az; levelrounding = off
      filt1: Filter | expr = !isScalingSystemDomain
  pg7: PlotGroup2D "2D Plot Group 7" | data = dset1
    con1: Contour | data = dset2; expr = mf.Az
  pg8: PlotGroup1D "1D Plot Group 8" | data = dset1
    glob1: Global | data = dset2; expr = {mf.PhiCoil_1, mf.PhiCoil_2, mf.PhiCoil_3}

Exports
  plot1: Plot | filename = C:\Users\Lenovo\Desktop\flux_data.txt